<?xml version="1.0"?>
<!--
File:     TSIO-550K.xml
Author:   Aero-Matic v 0.83

Inputs:
name:           TSIO-550K
type:           piston
power:          315 hp
augmented?      no
injected?       no

data according to http://www.continentalmotors.aero/uploadedFiles/Content/xHome/Billboards/500series_032012.pdf

bore: 5.25
stroke: 4.25
compression ratio: 7.5
max hp: 315 at 2500 RPM
-->

<piston_engine name="TSIO-550K">
	<air-intake-impedance-factor>0.18</air-intake-impedance-factor>
	<ram-air-factor>0.1</ram-air-factor>
	<minmp unit="INHG">         10.0 </minmp>
	<maxmp unit="INHG">         30.5 </maxmp>
	<displacement unit="IN3"> 550 </displacement>
	<maxhp>        315.00 </maxhp>
	<cycles>         4.0 </cycles>
	<idlerpm>      700.0 </idlerpm>
	<maxrpm>      2700.0 </maxrpm>
	<sparkfaildrop>  0.1 </sparkfaildrop>
	<volumetric-efficiency> 0.85 </volumetric-efficiency>
	<man-press-lag> 0.1 </man-press-lag>
	<static-friction  unit="HP"> 1.57 </static-friction>
	<starter-torque> 252.00 </starter-torque>
	<starter-rpm> 1400 </starter-rpm>
	<bsfc unit="LBS/HP*HR">           0.5683 </bsfc> <!--18.3 gallons per hour at 85% power = 113.46 lbs (AVGAS) per hour at 267.75 hp-->
	<stroke unit="IN">  4.25 </stroke>
	<bore unit="IN">    5.25 </bore>
	<cylinders>        6.0  </cylinders>
	<compression-ratio>  7.5 </compression-ratio>
	<numboostspeeds>1</numboostspeeds>
	<boostoverride>0</boostoverride>

	<ratedboost1>3</ratedboost1>
	<ratedaltitude1>18000</ratedaltitude1>
	<ratedpower1>215</ratedpower1>
	<ratedrpm1>2000</ratedrpm1>

	<!--	<ratedboost2>2</ratedboost2>
	<ratedaltitude2>18000</ratedaltitude2>
	<ratedpower2>215</ratedpower2>
	<ratedrpm2>2200</ratedrpm2>

	<ratedboost3>3</ratedboost3>
	<ratedaltitude3>18000</ratedaltitude3>
	<ratedpower3>215</ratedpower3>
	<ratedrpm3>2500</ratedrpm3>
	-->
</piston_engine>
